# Trial run of Powder loading

atom_style		granular
atom_modify		map	array
boundary		m	m	m
newton			off

communicate		single vel yes

units 			cgs

region			domain block 0.0 0.024 0.0 0.078 0.0 0.03 units box

create_box		1 domain

neighbor		0.008101 bin
neigh_modify	delay 1

### Setup

# Material and Interaction Properties
fix 		m1 all property/global youngsModulus peratomtype 5e7
fix 		m2 all property/global poissonsRatio peratomtype 0.45
fix 		m3 all property/global coefficientRestitution peratomtypepair 1 0.1
fix 		m4 all property/global coefficientFriction peratomtypepair 1 0.065

# New pair style
pair_style gran model hertz tangential history #Hertzian without cohesion
pair_coeff	* *

# Integrator
fix			integrate all nve/sphere

# Time step
timestep	0.00000005

# Gravity
fix		grav all gravity 981 vector 0.0 0.0 -1.0

# Particle Insertion
fix				pts1 all particletemplate/sphere 15485863 atom_type 1 density constant 4.43 &
				radius constant 5e-4
fix				pts2 all particletemplate/sphere 154849 atom_type 1 density constant 4.43 &
				radius constant 7.5e-4
fix				pts3 all particletemplate/sphere 49979687 atom_type 1 density constant 4.43 &
				radius constant 10e-4
fix				pts4 all particletemplate/sphere 15485867 atom_type 1 density constant 4.43 &
				radius constant 12.5e-4
fix				pts5 all particletemplate/sphere 32452843 atom_type 1 density constant 4.43 &
				radius constant 15e-4
fix				pts6 all particletemplate/sphere 32452867 atom_type 1 density constant 4.43 &
				radius constant 17.5e-4
fix				pts7 all particletemplate/sphere 67867979 atom_type 1 density constant 4.43 &
				radius constant 20e-4
fix				pts8 all particletemplate/sphere 86028121 atom_type 1 density constant 4.43 &
				radius constant 22.5e-4
fix				pts9 all particletemplate/sphere 16193 atom_type 1 density constant 4.43 &
				radius constant 25e-4
fix				pts10 all particletemplate/sphere 17167 atom_type 1 density constant 4.43 &
				radius constant 27.5e-4
fix				pts11 all particletemplate/sphere 16981 atom_type 1 density constant 4.43 &
				radius constant 30e-4


fix 				pdd all particledistribution/discrete 78593 11 pts1 0.044 pts2 0.077 pts3 0.088 pts4 0.121 &
				pts5 0.176 pts6 0.198 pts7 0.187 pts8 0.143 pts9 0.044 pts10 0.033 pts11 0.022


region 				factory block 0.0 0.024 0.0 0.078 0.02 0.026 units box
fix 				ins all insert/rate/region seed 51869 distributiontemplate pdd &
				nparticles 6000 particlerate 200000 insert_every 5 &
				overlapcheck yes vel constant 0. 0. 0.0 region factory ntry_mc 10000


# Boundary
fix box all mesh/surface file meshes/domain.stl type 1 scale 0.1 curvature 1e-5
fix plate all mesh/surface file meshes/plate.stl type 1 scale 0.1 curvature 1e-5
fix wall all wall/gran model hertz tangential history mesh n_meshes 2  meshes box plate

variable x1 atom x*0.01
variable y1 atom y*0.01
variable z1 atom z*0.01


compute 1 all property/atom radius
variable rad1 atom "c_1*0.01"

# Check time step and initialize dump file
#fix ctg all check/timestep/gran 1 0.01 0.01
run 1
#unfix ctg

#insert the first particles so that dump is not empty
dump		dmp all custom/vtk 7500 post/trial_*.vtk id type type x y z ix iy iz vx vy vz fx fy fz omegax omegay omegaz radius
dump		mydump all custom 750000 post/location v_x1 v_y1 v_z1 v_rad1
dump		mydump2 all custom 750000 post/parDist.xls v_rad1
dump        dump_particles all custom 10000 post/particles_*.vtk id type x y z radius


run			500000 upto

compute         2 all reduce sum c_1
thermo_style    custom step c_2
run             0
variable co atom "z+c_1 > 0.023"
group           layer variable co


delete_atoms group layer compress yes

# Initial stage
run			750000 upto
